New PVSystem.PV_1 bus1=t_bus3077_l phases=3 kV=0.208 kVA=20.000 Pmpp=20.000 model=1 conn=wye pf=1 irradiance=1 temperature=25 daily=PVShape
New PVSystem.PV_2 bus1=t_bus2052_l phases=3 kV=0.208 kVA=20.000 Pmpp=20.000 model=1 conn=wye pf=1 irradiance=1 temperature=25 daily=PVShape
New PVSystem.PV_3 bus1=t_bus3077_l phases=3 kV=0.208 kVA=20.000 Pmpp=20.000 model=1 conn=wye pf=1 irradiance=1 temperature=25 daily=PVShape
New PVSystem.PV_5 bus1=t_bus2043_l phases=3 kV=0.208 kVA=20.000 Pmpp=20.000 model=1 conn=wye pf=1 irradiance=1 temperature=25 daily=PVShape
New PVSystem.PV_11 bus1=t_bus2002_l phases=3 kV=0.208 kVA=20.000 Pmpp=20.000 model=1 conn=wye pf=1 irradiance=1 temperature=25 daily=PVShape
New PVSystem.PV_13 bus1=t_bus2052_l phases=3 kV=0.208 kVA=20.000 Pmpp=20.000 model=1 conn=wye pf=1 irradiance=1 temperature=25 daily=PVShape
New PVSystem.PV_15 bus1=t_bus3077_l phases=3 kV=0.208 kVA=20.000 Pmpp=20.000 model=1 conn=wye pf=1 irradiance=1 temperature=25 daily=PVShape
New PVSystem.PV_16 bus1=t_bus2040_l phases=3 kV=0.208 kVA=20.000 Pmpp=20.000 model=1 conn=wye pf=1 irradiance=1 temperature=25 daily=PVShape
New PVSystem.PV_22 bus1=t_bus2053_l phases=3 kV=0.208 kVA=20.000 Pmpp=20.000 model=1 conn=wye pf=1 irradiance=1 temperature=25 daily=PVShape
New PVSystem.PV_28 bus1=t_bus2058_l phases=3 kV=0.208 kVA=20.000 Pmpp=20.000 model=1 conn=wye pf=1 irradiance=1 temperature=25 daily=PVShape
New PVSystem.PV_30 bus1=t_bus1003_l phases=3 kV=0.208 kVA=20.000 Pmpp=20.000 model=1 conn=wye pf=1 irradiance=1 temperature=25 daily=PVShape
New PVSystem.PV_33 bus1=t_bus2030_l phases=3 kV=0.208 kVA=20.000 Pmpp=20.000 model=1 conn=wye pf=1 irradiance=1 temperature=25 daily=PVShape
New PVSystem.PV_35 bus1=t_bus2058_l phases=3 kV=0.208 kVA=20.000 Pmpp=20.000 model=1 conn=wye pf=1 irradiance=1 temperature=25 daily=PVShape
New PVSystem.PV_37 bus1=t_bus2040_l phases=3 kV=0.208 kVA=20.000 Pmpp=20.000 model=1 conn=wye pf=1 irradiance=1 temperature=25 daily=PVShape
New PVSystem.PV_39 bus1=t_bus2002_l phases=3 kV=0.208 kVA=20.000 Pmpp=20.000 model=1 conn=wye pf=1 irradiance=1 temperature=25 daily=PVShape
New PVSystem.PV_41 bus1=t_bus3077_l phases=3 kV=0.208 kVA=20.000 Pmpp=20.000 model=1 conn=wye pf=1 irradiance=1 temperature=25 daily=PVShape
New PVSystem.PV_6 bus1=t_bus3007_l phases=3 kV=0.208 kVA=15.000 Pmpp=15.000 model=1 conn=wye pf=1 irradiance=1 temperature=25 daily=PVShape
New PVSystem.PV_19 bus1=t_bus3077_l phases=3 kV=0.208 kVA=15.000 Pmpp=15.000 model=1 conn=wye pf=1 irradiance=1 temperature=25 daily=PVShape
New PVSystem.PV_20 bus1=t_bus3035_l phases=3 kV=0.208 kVA=15.000 Pmpp=15.000 model=1 conn=wye pf=1 irradiance=1 temperature=25 daily=PVShape
New PVSystem.PV_23 bus1=t_bus2040_l phases=3 kV=0.208 kVA=15.000 Pmpp=15.000 model=1 conn=wye pf=1 irradiance=1 temperature=25 daily=PVShape
New PVSystem.PV_26 bus1=t_bus1004_l phases=3 kV=0.208 kVA=15.000 Pmpp=15.000 model=1 conn=wye pf=1 irradiance=1 temperature=25 daily=PVShape
New PVSystem.PV_31 bus1=t_bus1009_l phases=3 kV=0.208 kVA=15.000 Pmpp=15.000 model=1 conn=wye pf=1 irradiance=1 temperature=25 daily=PVShape
New PVSystem.PV_34 bus1=t_bus2053_l phases=3 kV=0.208 kVA=15.000 Pmpp=15.000 model=1 conn=wye pf=1 irradiance=1 temperature=25 daily=PVShape
New PVSystem.PV_44 bus1=t_bus2029_l phases=3 kV=0.208 kVA=15.000 Pmpp=15.000 model=1 conn=wye pf=1 irradiance=1 temperature=25 daily=PVShape
New PVSystem.PV_4 bus1=t_bus3037_l phases=3 kV=0.208 kVA=10.000 Pmpp=10.000 model=1 conn=wye pf=1 irradiance=1 temperature=25 daily=PVShape
New PVSystem.PV_7 bus1=t_bus3039_l phases=3 kV=0.208 kVA=10.000 Pmpp=10.000 model=1 conn=wye pf=1 irradiance=1 temperature=25 daily=PVShape
New PVSystem.PV_8 bus1=t_bus3032_l phases=3 kV=0.208 kVA=10.000 Pmpp=10.000 model=1 conn=wye pf=1 irradiance=1 temperature=25 daily=PVShape
New PVSystem.PV_10 bus1=t_bus3002_l phases=3 kV=0.208 kVA=10.000 Pmpp=10.000 model=1 conn=wye pf=1 irradiance=1 temperature=25 daily=PVShape
New PVSystem.PV_29 bus1=t_bus3006_l phases=3 kV=0.208 kVA=10.000 Pmpp=10.000 model=1 conn=wye pf=1 irradiance=1 temperature=25 daily=PVShape
New PVSystem.PV_32 bus1=t_bus3077_l phases=3 kV=0.208 kVA=10.000 Pmpp=10.000 model=1 conn=wye pf=1 irradiance=1 temperature=25 daily=PVShape
New PVSystem.PV_14 bus1=t_bus3104_l phases=2 kV=0.208 kVA=8.000 Pmpp=8.000 model=1 conn=wye pf=1 irradiance=1 temperature=25 daily=PVShape
New PVSystem.PV_17 bus1=t_bus3121_l phases=2 kV=0.208 kVA=8.000 Pmpp=8.000 model=1 conn=wye pf=1 irradiance=1 temperature=25 daily=PVShape
New PVSystem.PV_24 bus1=t_bus3115_l phases=2 kV=0.208 kVA=8.000 Pmpp=8.000 model=1 conn=wye pf=1 irradiance=1 temperature=25 daily=PVShape
New PVSystem.PV_25 bus1=t_bus3098_l phases=2 kV=0.208 kVA=8.000 Pmpp=8.000 model=1 conn=wye pf=1 irradiance=1 temperature=25 daily=PVShape
New PVSystem.PV_27 bus1=t_bus3157_l phases=2 kV=0.208 kVA=8.000 Pmpp=8.000 model=1 conn=wye pf=1 irradiance=1 temperature=25 daily=PVShape
New PVSystem.PV_40 bus1=t_bus3059_l phases=2 kV=0.208 kVA=8.000 Pmpp=8.000 model=1 conn=wye pf=1 irradiance=1 temperature=25 daily=PVShape
New PVSystem.PV_42 bus1=t_bus3014_l phases=2 kV=0.208 kVA=8.000 Pmpp=8.000 model=1 conn=wye pf=1 irradiance=1 temperature=25 daily=PVShape
New PVSystem.PV_43 bus1=t_bus3027_l phases=2 kV=0.208 kVA=8.000 Pmpp=8.000 model=1 conn=wye pf=1 irradiance=1 temperature=25 daily=PVShape
New PVSystem.PV_9 bus1=t_bus3123_l phases=2 kV=0.208 kVA=5.000 Pmpp=5.000 model=1 conn=wye pf=1 irradiance=1 temperature=25 daily=PVShape
New PVSystem.PV_18 bus1=t_bus3063_l phases=2 kV=0.208 kVA=5.000 Pmpp=5.000 model=1 conn=wye pf=1 irradiance=1 temperature=25 daily=PVShape
New PVSystem.PV_38 bus1=t_bus3145_l phases=2 kV=0.208 kVA=5.000 Pmpp=5.000 model=1 conn=wye pf=1 irradiance=1 temperature=25 daily=PVShape
New PVSystem.PV_12 bus1=t_bus3137_l phases=2 kV=0.208 kVA=3.000 Pmpp=3.000 model=1 conn=wye pf=1 irradiance=1 temperature=25 daily=PVShape
New PVSystem.PV_21 bus1=t_bus3033_l phases=3 kV=0.208 kVA=3.000 Pmpp=3.000 model=1 conn=wye pf=1 irradiance=1 temperature=25 daily=PVShape
New PVSystem.PV_36 bus1=t_bus3021_l phases=2 kV=0.208 kVA=3.000 Pmpp=3.000 model=1 conn=wye pf=1 irradiance=1 temperature=25 daily=PVShape

! Curva Volt-VAr IEEE 1547 utilizada no projeto
New XYCurve.VoltVarCurve npts=4 Xarray=[0.92 0.98 1.02 1.08] Yarray=[+0.44 0.00 0.00 -0.44]
New InvControl.InvPVCtrl mode=VOLTVAR vvc_curve1=VoltVarCurve voltage_curvex_ref=rated RefReactivePower=VARMAX deltaQ_factor=1 VoltageChangeTolerance=0.01 VarChangeTolerance=0.01 EventLog=Yes
