Redirect /home/matheus/Documentos/BtM-PV-estimating_BKP_3/BtM-PV-estimating_A1_VoltVar/experimentos/experimento_10_execucoes_Kara_PVWatts/execucao_02/dados/inputs/cenario_com_PV/geradoresPV_40_VV.dss
